"Investigation of Random Quantities"
# Student: Vagif Gurbanzade
# Dataset: T9
#
# Aim: To statistically investigate repeated voltage measurements, investigate their distribution, detect possible outliers and estimate measurement uncertainty.
D := READCSV("T9_Mathcad_Data_Numeric.csv")
D = [
    0, 234.32;
    0.334, 234.31;
    0.72, 234.32;
    1.016, 234.32;
    1.326, 234.35;
    1.639, 234.37;
    1.957, 234.36;
    2.336, 234.34;
    2.719, 234.33;
    3.028, 234.33
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]
t := submatrix(D, 0, 999, 0, 0)
U := submatrix(D, 0, 999, 1, 1)
t = [
    0; 0.334; 0.72; 1.016; 1.326; 1.639; 1.957; 2.336; 2.719; 3.028
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]
U = [
    234.32; 234.31; 234.32; 234.32; 234.35; 234.37; 234.36; 234.34; 234.33; 234.33
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]
"Descriptive Statistics"
N := length(U)
N = 1000
Umean := mean(U)
Umean = 234.672
s := stdev(U)
s = 0.198694
Umin := min(U)
Umin = 234.14
Umax := max(U)
Umax = 235.07
# The mean represents the average measured voltage. The standard deviation describes how much the individual measurements can be varied around the mean.
"Three-Sigma Outlier Test"
L3 := Umean - 3*s
L3 = 234.076
H3 := Umean + 3*s
H3 = 235.268
# Let's compare the minimum and maximum values with given boundaries:
Umin > L3 = 1
Umax < H3 = 1
# Statements are true.
# All measured values are within the mean ± 3s interval. Therefore, no outliers were detected according to the three-sigma criterion.
"Voltage and Time depending"
# [plot: U (V) vs t (s)]
# The graph demonstrates how voltage had been changed per given time.
"Histogram of Voltage measurements"
nb := 20
H := histogram(nb, U)
# Now, we separated the columns:
Uh := submatrix(H, 0, nb - 1, 0, 0)
Fh := submatrix(H, 0, nb - 1, 1, 1)
H = [
    234.163, 2;
    234.21, 6;
    234.256, 25;
    234.303, 38;
    234.349, 35;
    234.396, 20;
    234.442, 32;
    234.489, 50;
    234.535, 75;
    234.582, 85;
    234.628, 78;
    234.675, 44;
    234.721, 96;
    234.768, 100;
    234.814, 88;
    234.861, 73;
    234.907, 74;
    234.954, 43;
    235, 26;
    235.047, 10
]
Uh = [234.163; 234.21; 234.256; 234.303; 234.349; 234.396; 234.442; 234.489; 234.535; 234.582; 234.628; 234.675; 234.721; 234.768; 234.814; 234.861; 234.907; 234.954; 235; 235.047]
Fh = [2; 6; 25; 38; 35; 20; 32; 50; 75; 85; 78; 44; 96; 100; 88; 73; 74; 43; 26; 10]
# [plot: Fh vs Uh]
# The histogram shows the frequency distribution of the measured voltage values.
"Measurement of Uncertainty"
TypeA
uA := s/sqrt(N)
uA = 0.00628325
# Type A uncertainty is caused by the random variation of repeated measurements. Dividing the standard deviation by the square root of the number of measurements gives the uncertainty of the mean.
# Error bound of instrument:
dU := 0.01*Umean + 100*0.01
dU = 3.34672 V/V
TypeB
uB := dU/sqrt(3)
uB = 1.93223 V/V
# Type B uncertainty directly depends on the accuracy limit of the measuring instrument. Since the instrumental error is assumed to be uniformly distributed between -dU and +dU, the error limit is divided by the square root of 3.
"Combined Uncertainty"
uC := sqrt(uA^2 + uB^2)
uC = 1.93224 V/V
# If we need to find combined uncertainty, firstly, we use this equation. Type A and Type B uncertainties are independent, so their squares are added and the square root is taken to obtain the combined standard uncertainty.
"Expanded Uncertainty"
k := 1.65
Uexp := k*uC
Uexp = 3.1882 V/V
# The coverage factor k = 1.65 corresponds to an approximately 90% confidence level. The expanded uncertainty is obtained by multiplying the combined standard uncertainty by the coverage factor.
"Final Result"
# The final measurement result at approximately 90% confidence is:
#
# U= (234.7 +- 3.2) V
"Conclusion"
# 1000 Voltage data had been analyzed: mean is equal to 234.672 V, the standard deviation was 0.199 V . In three-sigma criterion any outlier was not found. Type A and Type B uncertainties were calculated and combined. The final result was U = (234.7 ± 3.2) V (90% confidence).
